// SBML level 2 version 3

model tests_files_expected_output_test_output_SBML_sbml()

  // Compartments:
  compartment reaction = 1e-3;

  // Species:
  species s_Cat in reaction = 0;
  species s_C1 in reaction = 0;
  species s_C2 in reaction = 0;
  species _6776 in reaction = 0;
  species _6775 in reaction = 0;
  species _6791 in reaction = 0;
  species _6796 in reaction = 0;
  species _6769 in reaction = 0;
  species _6773 in reaction = 0;
  species _6800 in reaction = 0;
  species _6792 in reaction = 0;
  species _6781 in reaction = 0;
  species _6793 in reaction = 0;
  species _6790 in reaction = 0;

  // Reactions:
  r_0: s_C2 + s_Cat => _6769; r_0_k*s_C2*s_Cat;
    r_0_k = 1800000 litre_per_mole_per_second;
  r_1: _6769 => s_C2 + s_Cat; r_1_k*_6769;
    r_1_k = 1.477297 per_second;
  r_2: _6769 => _6773; r_2_k*_6769;
    r_2_k = 27.77778 per_second;
  r_3: _6773 => _6775 + _6776; r_3_k*_6773;
    r_3_k = 1.477297 per_second;
  r_4: _6773 => _6769; r_4_k*_6773;
    r_4_k = 27.77778 per_second;
  r_5: _6775 + s_C1 => _6781; r_5_k*_6775*s_C1;
    r_5_k = 1800000 litre_per_mole_per_second;
  r_6: _6775 + _6776 => _6773; r_6_k*_6775*_6776;
    r_6_k = 1800000 litre_per_mole_per_second;
  r_7: _6781 => _6775 + s_C1; r_7_k*_6781;
    r_7_k = 1.477297 per_second;
  r_8: _6781 => _6792; r_8_k*_6781;
    r_8_k = 27.77778 per_second;
  r_9: _6781 => _6790 + _6791; r_9_k*_6781;
    r_9_k = 18.51852 per_second;
  r_10: _6790 => _6793; r_10_k*_6790;
    r_10_k = 27.77778 per_second;
  r_11: _6793 => _6796 + s_Cat; r_11_k*_6793;
    r_11_k = 1.477297 per_second;
  r_12: _6793 => _6790; r_12_k*_6793;
    r_12_k = 27.77778 per_second;
  r_13: _6792 => _6800 + s_Cat; r_13_k*_6792;
    r_13_k = 1.477297 per_second;
  r_14: _6792 => _6781; r_14_k*_6792;
    r_14_k = 27.77778 per_second;
  r_15: _6792 => _6793 + _6791; r_15_k*_6792;
    r_15_k = 18.51852 per_second;
  r_16: _6800 => _6796 + _6791; r_16_k*_6800;
    r_16_k = 18.51852 per_second;
  r_17: _6796 + s_Cat => _6793; r_17_k*_6796*s_Cat;
    r_17_k = 1800000 litre_per_mole_per_second;

  // Unit definitions:
  unit per_second = 1 / second;
  unit litre_per_mole_per_second = litre / (mole * second);
end
