// SBML level 2 version 3

model tests_files_expected_output_test_output_SBML2_sbml()

  // Compartments:
  compartment reaction = 1e-3;

  // Species:
  species s_I in reaction = 0;
  species s_A in reaction = 0;
  species s_B in reaction = 0;
  species s_C in reaction = 0;
  species _6962 in reaction = 0;
  species _6968 in reaction = 0;
  species _6973 in reaction = 0;
  species _6977 in reaction = 0;

  // Reactions:
  r_0: s_A + s_I => _6962; r_0_k*s_A*s_I;
    r_0_k = 1800000 litre_per_mole_per_second;
  r_1: _6962 => s_A + s_I; r_1_k*_6962;
    r_1_k = 1.477297 per_second;
  r_2: _6962 => _6968; r_2_k*_6962;
    r_2_k = 18.51852 per_second;
  r_3: _6968 => _6962; r_3_k*_6968;
    r_3_k = 0.0303912008 per_second;
  r_4: s_B + s_I => _6973; r_4_k*s_B*s_I;
    r_4_k = 1800000 litre_per_mole_per_second;
  r_5: _6973 => s_B + s_I; r_5_k*_6973;
    r_5_k = 1.477297 per_second;
  r_6: _6973 => _6977; r_6_k*_6973;
    r_6_k = 55.55556 per_second;
  r_7: _6977 => _6973; r_7_k*_6977;
    r_7_k = 55.55556 per_second;

  // Unit definitions:
  unit per_second = 1 / second;
  unit litre_per_mole_per_second = litre / (mole * second);
end
