// SBML level 2 version 3

model tests_files_expected_output_test_output_SBMLCondensed_sbml()

  // Compartments:
  compartment reaction = 1e-3;

  // Species:
  species _7283 in reaction = 0;
  species _7286 in reaction = 0;
  species _7288 in reaction = 0;
  species _7284 in reaction = 0;
  species _7285 in reaction = 0;
  species _7287 in reaction = 0;
  species _7282 in reaction = 0;

  // Reactions:
  r_0: _7284 + _7282 => _7286 + _7285; r_0_k*_7284*_7282;
    r_0_k = 876687.7 litre_per_mole_per_second;
  r_1: _7286 + _7283 => _7288 + _7282 + _7287; r_1_k*_7286*_7283;
    r_1_k = 1667015 litre_per_mole_per_second;
  r_2: _7286 + _7285 => _7284 + _7282; r_2_k*_7286*_7285;
    r_2_k = 876687.7 litre_per_mole_per_second;

  // Unit definitions:
  unit per_second = 1 / second;
  unit litre_per_mole_per_second = litre / (mole * second);
end
